Rz := 6378.1363*km
mu := 3.986004418*10^14*m^3/s^2
ORIGIN := 1
P0 := [1702631.521; 126415.744; 6769207.534]*m
V0 := [-5734.531; -4667.074; 1528.123]*m/s
r := |P0| - Rz = 603060 m
r/km = 603.06
P0b := P0/Rz = [0.266948; 0.0198202; 1.06131]
V0b := V0/sqrt(mu/Rz) = [-0.725397; -0.590368; 0.193302]
t_b_r := sqrt(Rz^3/mu) = 806.811 s
S0 := stack(P0b, V0b) = [0.266948; 0.0198202; 1.06131; -0.725397; -0.590368; 0.193302]
rb := |P0|/Rz = 1.09455
t0 := 0
tk := 24*hr
tkb := tk/t_b_r = 107.088
D(t, S) := [
    S[4];
    S[5];
    S[6];
    -S[1]/sqrt(S[1]^2 + S[2]^2 + S[3]^2)^3;
    -S[2]/sqrt(S[1]^2 + S[2]^2 + S[3]^2)^3;
    -S[3]/sqrt(S[1]^2 + S[2]^2 + S[3]^2)^3
]
Res := Rkadapt(S0, t0, tkb, 10000, D)
ik := rows(Res) = 10001
ttk := Res[:, 1][ik]*t_b_r = 86400 s
ttk/hr = 24
Pk := [Res[:, 2][ik]; Res[:, 3][ik]; Res[:, 4][ik]]*Rz = [4024114; 2168333; 5275492] m
Vk := [Res[:, 5][ik]; Res[:, 6][ik]; Res[:, 7][ik]]*sqrt(mu/Rz) = [-4160.39; -4036.28; 4838.82] m/s
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X(u, v) := sin(v)*cos(u)
xs := Res[:, 2]
Y(u, v) := sin(v)*sin(u)
ys := Res[:, 3]
Z(u, v) := cos(v)
zs := Res[:, 4]
